##------------------------------------
clear
log             ./dump/log.crack
units           metal
dimension       3
boundary        s s p
atom_style      atomic
atom_modify     map yes
variable        latparam equal 2.834319

variable        box_lengthx equal 38
variable        box_lengthy equal 38
variable        xdim_1 equal -1*(${latparam}*${box_lengthx})*sqrt(2)-0.001
variable        ydim_1 equal -1*(${latparam}*${box_lengthy})*sqrt(2)-0.001
variable        xdim_2 equal 1*(${latparam}*${box_lengthx})*sqrt(2)
variable        ydim_2 equal 1*(${latparam}*${box_lengthy})*sqrt(2)
variable        zdim equal (${latparam}*1)*sqrt(1)
#-------Define geometry  (2d X 2d) -------------------------------------------------
lattice         bcc ${latparam} orient x 1 -1 0 orient y 1 1 0 orient z 0 0 1
region          box block ${xdim_1} ${xdim_2} ${ydim_1} ${ydim_2} -0.0001 ${zdim} units box
create_box      2 box
create_atoms    1 box

#-------Define interatomic potential------------------------------------
include         ../potential.in
neighbor        2.0 bin
neigh_modify every 1 delay 0 check yes
#-------Define atom mass (no needed for moelcular statics) -------
mass            1 55.845
mass            2 55.845
#-------Compute-------
compute         eng all pe/atom
compute         new all temp
compute         csym all centro/atom bcc
compute         1 all pe
compute         stress all stress/atom NULL

##----------------crack tip definition----------
variable        xtip equal 0.000001
variable        ytip equal ${latparam}*sqrt(1)*0.25

#--------------Define the CIRCULAR region for simulation-----------------
variable        radius1 equal 150
region          remained  cylinder z ${xtip} ${ytip} ${radius1} INF INF units box
group           remained region remained
group           deleted subtract all remained
delete_atoms    group deleted
#---------------------------Boundary region------------------------------
variable        radius2 equal 140
region          mobile  cylinder z ${xtip} ${ytip} ${radius2} INF INF units box
group           mobile region mobile
group           boundary subtract all mobile
set             group boundary type 2

#--------Initial relaxation ------------
thermo          100
thermo_style    custom step pe lx ly lz pxx pyy pzz pxy pxz pyz press

dump            1 all custom 1 ./dump/file.crack.dump.ref id type x y z
run             0
undump          1

reset_timestep  0
compute         disp all displace/atom
#---------------aniotropic input as a function of the material elastic properties-------------
variable        s1_real equal  -0.00000000
variable        s1_imag equal   1.80464110
variable        s2_real equal  -0.00000000
variable        s2_imag equal   0.55412680
variable        p1_real equal  -0.01279699
variable        p1_imag equal  -0.00000000
variable        p2_real equal  -0.00235453
variable        p2_imag equal  -0.00000000
variable        q1_real equal   0.00000000
variable        q1_imag equal  -0.00424908
variable        q2_real equal  -0.00000000
variable        q2_imag equal  -0.00709115
#-----------------------------------------------------------------------------------------------

#------------------initial crack from which the loop will be started------------------------------------------
reset_timestep  0
# test and set a proper K that can hold the crack tip at initial position.
displace_atoms_crackanis all 110 ${s1_real} ${s1_imag} ${s2_real} ${s2_imag} ${p1_real} ${p1_imag} ${p2_real} ${p2_imag} ${q1_real} ${q1_imag} ${q2_real} ${q2_imag} ${xtip} ${ytip}

#------------------increment defining for crack loop-----------------------------------------------------------
fix             xorig all store/state 0 x
fix             yorig all store/state 0 y
variable        xorig1 atom f_xorig
variable        yorig1 atom f_yorig
run             0

displace_atoms_crackanis all 1 ${s1_real} ${s1_imag} ${s2_real} ${s2_imag} ${p1_real} ${p1_imag} ${p2_real} ${p2_imag} ${q1_real} ${q1_imag} ${q2_real} ${q2_imag} ${xtip} ${ytip}
variable        delx atom x-v_xorig1
variable        dely atom y-v_yorig1
run             0

fix             dx all store/state 0 v_delx
fix             dy all store/state 0 v_dely
variable        xx atom f_dx
variable        yy atom f_dy
run             0

variable        tmp equal "lx"
variable        LX equal ${tmp}
variable        tmp equal "ly"
variable        LY equal ${tmp}
variable        tmp equal "lz"
variable        LZ equal ${tmp}
variable        tmp equal "atoms"
variable        N equal ${tmp}
variable        V equal (${LX}*${LY}*${LZ})
#----------------start of the crack loop------------------------------
label           loop_start
variable        K loop 111 160
	fix             1 boundary setforce 0.0 0.0 0.0
	variable        xnew atom x+v_xx
	variable        ynew atom y+v_yy
	set             group all x v_xnew
	set             group all y v_ynew

	thermo          1
	thermo_style    custom step pe lx ly lz pxx pyy pzz pxy pxz pyz press
        reset_timestep  0

	# --------- Computation of the total stress, strain, and stress per atom ------
	variable        sigma_xx atom c_stress[1]/(${V}/${N}*10000)
	variable        sigma_yy atom c_stress[2]/(${V}/${N}*10000)
	variable        sigma_zz atom c_stress[3]/(${V}/${N}*10000)
	variable        sigma_xy atom c_stress[4]/(${V}/${N}*10000)

        dump            11 all custom 20 ./dump/file.crack.dump.${K} id type x y z fx fy fz c_disp[1] c_disp[2] c_disp[3] v_sigma_xx v_sigma_yy v_sigma_zz v_sigma_xy

	min_style       cg
	minimize        1e-12 10e-9 10000000 100000000

	timestep        0.01
	min_style       fire
	minimize        0.0 5e-2 100000 100000

 	undump          11
	unfix           1

next                K
jump                crack.in loop_start
